Simulations: Version=175
  DataStore
    ParallelPostSimulationTool
      Probability: TableName=BugeseraSensibility; Exceedence=false; FieldToSplitOn=SimulationName
      Probability WaterByNProbability: TableName=WaterByNSensibilityReport; Exceedence=false; FieldToSplitOn=SimulationName
  Folder Replacements
    Report DailyReport: EventNames=[Clock].DoReport
      VariableNames:
        [Clock].Today
        [Clock].Today.Year as Year
        [Clock].Today.DayOfYear as day_of_year
        [Clock].Today.Date as Date
        [Phenology].DltTTFM as DltTTFM
        [Phenology].ThermalTime as TT
        [Phenology].DltTTFM
        [Phenology].PhenoWaterStress
        [Sorghum].DaysAfterSowing as Das
        [Sorghum].Phenology.Stage as Stage
        [Sorghum].Phenology.CurrentStageName
        [Sorghum].Phenology.CurrentPhase.Name
        [Sorghum].AboveGround.Wt
        [Sorghum].TotalLive.Wt
        [Sorghum].TotalDead.Wt
        [Sorghum].AboveGround.Wt as BiomassWt
        [Sorghum].AboveGround.N as BiomassN
        [Sorghum].Total.Wt
        [Sorghum].Root.Live.Wt as RootGreenWt
        [Sorghum].Root.Live.N as RootGreenN
        [Sorghum].Arbitrator.SDRatioBound as WaterSD
        [Leaf].Senesced.Wt
        [Leaf].Senesced.N
        [Leaf].Dead.Wt
        [Leaf].Dead.N
        [Leaf].NitrogenPhenoStress
        [Sorghum].Leaf.Live.Wt as LeafGreenWt
        [Sorghum].Leaf.Live.N as LeafGreenN
        [Sorghum].Stem.Live.Wt as StemGreenWt
        [Sorghum].Stem.Live.N as StemGreenN
        [Sorghum].Rachis.Live.Wt as RachisGreenWt
        [Sorghum].Rachis.Live.N as RachisGreenN
        [Sorghum].Grain.Live.Wt as GrainGreenWt
        [Sorghum].Grain.Live.N as GrainGreenN
        [Sorghum].Grain.Live.NConc * 100 as GrainGreenNConc // old apsim grain nconc is in percent
        [Sorghum].Grain.NumberFunction as GrainNo
        [Sorghum].Grain.Size * 1000 as GrainSize
        [Soil].Water.Volumetric
        sum([Soil].SoilWater.ESW) as ESW
        [Sorghum].Phenology.Juvenile.Target
        sum([Soil].NO3.kgha) as NO3
        sum([Soil].Water.Volumetric) as sw
        [Soil].NO3.kgha
        [Soil].NH4.kgha
        [Sorghum].Leaf.Photosynthesis.FW as RUEStress
        [Phenology].Emerging.Target
        [Phenology].Juvenile.Target
        [Phenology].JuvenileToFloralInit.Target
        [Phenology].FloralInitToFlagLeaf.Target
        [Phenology].FlagLeafToFlowering.Target
        [Phenology].FloweringToGrainFilling.Target
        [Phenology].GrainFilling.Target
        [Phenology].Maturing.Target
        [Phenology].MaturityToHarvestRipe.Target
        [Phenology].TTFromEmergence
        [Phenology].ThermalTime
        [Leaf].CoverGreen
        [Leaf].CoverTotal
        [Leaf].CoverDead
        [Leaf].RadiationIntercepted
        [Leaf].WaterDemand
        [Leaf].WaterAllocation
        [Leaf].Photosynthesis
        ([Leaf].LAITotal / ([Sorghum].Population + 0.00001) * 10000 as TPLA // gpla + spla as per old apsim. this assumes paddock area = 1ha
        [Leaf].NDemands.Structural
        [Leaf].DMPotentialAllocation.Total
        [Leaf].SLN as SLN
        [Leaf].FertileTillerNumber
        [Phenology].TTEmergToFlagLeaf
        [Weather].Radn
        [Arbitrator].DM.TotalFixationSupply
        [Arbitrator].N.TotalFixationSupply
        [Arbitrator].N.TotalPlantSupply
        [Arbitrator].N.SupplyDemandRatioN
        [Arbitrator].N.UptakeSupply
        [Arbitrator].N.Uptake
        [Arbitrator].SDRatio
        [Arbitrator].SDRatioBound
        [Arbitrator].WatSupply
        [Grain].Live.Wt
        [Grain].Live.N
        [Grain].Size
        [Grain].LiveFWt
        [Grain].NDemand.Total
        [Grain].PotGrainFillRate
        [Grain].DMCaryopsis
        [Grain].NumberFunction
        [Leaf].DMDemands.Structural.DMDemandFunction
        [Stem].DMDemands.Structural.DMDemandFunction
        [Rachis].DMDemands.Structural.DMDemandFunction
        [Leaf].DMRemaining
        [Leaf].DMSupplyFixation
        [Leaf].DMSupplyFunction
        ([Leaf].DMSupplyFixation - [Leaf].DMSupplyFunction)
        [Leaf].Photosynthesis
        [Leaf].WaterDemandFunction
        [Leaf].WaterAllocation
        [Leaf].DMDemands.Structural.DMDemandFunction
        [Leaf].Photosynthesis
        [Leaf].LAI
        [Leaf].SenescedLai
        [Leaf].LAI as LAI
        [Leaf].SenescedLai as SLAI
        [Leaf].Live.N
        [Leaf].DMPotentialAllocation.Structural
        [Leaf].NDemand.Total
        [Leaf].NDemand.Structural
        [Leaf].NDemand.Metabolic
        [Leaf].NDemand.Storage
        [Leaf].NDemand.Total
        [Leaf].Allocated.StructuralN
        [Leaf].Allocated.MetabolicN
        [Leaf].Allocated.StorageN
        [Leaf].Senesced.Wt
        [Leaf].FinalLeafNo as FinalLeafNo
        [Leaf].LeafNo as LeafNo
        [Stem].Live.Wt
        [Stem].Dead.Wt
        [Stem].Senesced.Wt
        [Stem].NDemand.Total
        [Stem].NDemand.Structural
        [Stem].NDemand.Metabolic
        [Stem].NDemand.Storage
        [Stem].NDemand.Total
        [Stem].Allocated.StructuralN
        [Stem].Allocated.MetabolicN
        [Stem].Allocated.StorageN
        [Root].NSupply.Total
        [Rachis].NDemand.Total
        [Leaf].NDemand.Total
        [Root].potentialDMAllocation.Structural
        [Root].NDemand.Structural
        [Root].NDemand.Metabolic
        [Root].NDemand.Storage
        [Root].NDemand.Total
        [Root].Allocated.StructuralN
        [Root].Allocated.MetabolicN
        [Root].Allocated.StorageN
        [Root].DMDemand.Total
        [Root].DMDemand.Structural
        [Root].Depth
        [Root].NTakenUp
        [Root].NUptake
        [Root].Senesced.Wt
        [Root].Senesced.N
        [Root].Dead.Wt
        [Root].Senesced.StructuralWt
        [Root].Detached.N
        [Root].Detached.Wt
        [Root].PlantZone.NUptakeSupply
        [Sorghum].TotalLive.N
        [Arbitrator].N.Allocated
        [Arbitrator].DM.NotAllocated
        [Root].NDemand.Structural + [Stem].NDemand.Structural as StructuralDemandB4Rachis
        [Root].PlantZone.DeltaNO3
        ([Arbitrator].N.TotalPlantDemand - [Leaf].NDemand.Structural) as PlantDemand
        [Arbitrator].N.TotalPlantDemand as TotalPlantNDemand
        [Phenology].DltTT.Stress as stress
        [Arbitrator].NitrogenUptakeMethod.NDiffusionSupply as NDiffusionSupply
        [Arbitrator].NitrogenUptakeMethod.NMassFlowSupply as NMassFlowSupply
        [DCaPST].DcapstModel.ActualBiomass
        [DCaPST].DcapstModel.B
        [DCaPST].DcapstModel.Biolimit
        [DCaPST].DcapstModel.InterceptedRadiation
        [DCaPST].DcapstModel.IntervalResults
        [DCaPST].DcapstModel.PotentialBiomass
        [DCaPST].DcapstModel.Reduction
        [DCaPST].DcapstModel.WaterDemanded
        [DCaPST].DcapstModel.WaterSupplied
    Folder CultivarParameters
      Folder Sorghum
        Cultivar CSH13R
          Command:
            Parameters.Canopy.SLNRatioTop = 1.5
            Parameters.Pathway.SpectralCorrectionFactor = 0.3466
  Folder Validation
    Folder Hermitage
      Experiment HE1
        Memo HE1 Description
          Experiment: HE1

          Description: HE1 - High N/Irrig. - 3 Indian/Aust. Cultivars

          Start Date: 1/12/1996

          End Date: 30/06/1997

          |SimulationName       |Cultivar |
          |---------------------|---------|
          |Sorghum_HE1_T1       |QL41xQL36|
          |Sorghum_HE1_T2       |Buster   |
          |Sorghum_HE1_T3       |M35-1    |
        Factors
          Factor Cultivar
            CompositeFactor Buster
              Specifications:
                [SowingRule].Script.Cultivar = Buster
                [SowingRule].Script.Ftn = 0.2
        Simulation HE1Base
          Clock: Start=1996-12-01; End=1997-06-30
          Summary
          Weather: FileName=Met/HE1.met
          SoilArbitrator
          Zone Paddock: Area=1; Slope=0; AspectAngle=0; Altitude=50
            Report DailyReport
              VariableNames:
                GrainTempFactor
                GrainTempFactor
            Manager SowingRule
              Date = 01/09/1997 00:00:00
              Density = 10
              Depth = 30
              Cultivar = QL41xQL36
              RowSpacing = 500
              RowConfiguration = Solid
              TilleringMethod = FixedTillering
              Ftn = 0
```csharp
using Models.Soils;
using System;
using Models.Core;
using Models.PMF;
using APSIM.Shared.Utilities;

namespace Models
{
    [Serializable]
    public class Script : Model
    {
        [Description("Enter sowing date (dd/mm/yyyy) : ")]
        public DateTime Date { get; set; }

        [Description("Enter sowing density  (plants/m2) : ")]
        public double Density { get; set; }

        [Description("Enter sowing depth  (mm) : ")]
        public double Depth { get; set; }

        [Description("Enter cultivar : ")]
        [Display(Type = DisplayType.CultivarName)]
        public string Cultivar { get; set; }

        [Description("Enter row spacing (mm) : ")]
        public double RowSpacing { get; set; }

        [Description("Enter skip row configuration : ")]
        public RowConfigurationType RowConfiguration { get; set; }

        [Description("Tillering Method")]
        public TilleringMethodType TilleringMethod { get; set; } = 0;

        [Description("Enter Fertile Tiller No. : ")]
        public double Ftn { get; set; }

        public enum TilleringMethodType 
        {
            RuleOfThumb = -1,
            FixedTillering = 0,
            DynamicTillering = 1
        }
        public enum RowConfigurationType 
        {
            Solid, SingleSkip, DoubleSkip
        }

        [Link]
        private Zone paddock;

        [Link]
        private Clock clock;

        [Link]
        private Plant crop;

        [EventSubscribe("DoManagement")]
        private void OnDoManagement(object sender, EventArgs e)
        {
            if (clock.Today == Date /* && isFallow */)
            {
                double population = Density * paddock.Area;
                crop.Sow(cultivar:Cultivar, population:population, depth:Depth, rowSpacing:RowSpacing, rowConfig: (double)RowConfiguration, tillering:(int)TilleringMethod, ftn:Ftn);
            }
        }
    }
}
```
            Manager HarvestingRule
```csharp
using Models.Soils;
using System;
using Models.Core;
using Models.PMF;

namespace Models
{
    // This is being overridden by the Harvesting Rule in Replacements.
    [Serializable]

    public class Script : Model
    {
        [Link]
        private Clock clock;

        [Link]
        private IPlant crop;

        [EventSubscribe("DoManagement")]
        private void OnDoCalculations(object sender, EventArgs e)
        {
            if (crop.IsReadyForHarvesting)
            {
                crop.Harvest();
                crop.EndCrop();
            }
        }
    }
}
```
            Operations FertiliserSchedule
              1996-12-20  [Fertiliser].Apply(33, Fertiliser.Types.NO3N, 50);
              1996-12-23  [Fertiliser].Apply(0, Fertiliser.Types.NO3N, 50);
              1996-12-23  [Fertiliser].Apply(119, Fertiliser.Types.NO3N, 50);
              1997-02-12  [Fertiliser].Apply(59, Fertiliser.Types.NO3N, 50);
              1997-03-21  [Fertiliser].Apply(59, Fertiliser.Types.NO3N, 50);
            Operations IrrigationSchedule
              1997-01-09  [Irrigation].Apply(52);
              1997-01-16  [Irrigation].Apply(36);
              1997-01-21  [Irrigation].Apply(18);
              1997-01-29  [Irrigation].Apply(20);
              1997-02-07  [Irrigation].Apply(14);
              1997-03-13  [Irrigation].Apply(30);
              1997-03-21  [Irrigation].Apply(45);
              1997-04-10  [Irrigation].Apply(27);
              1997-04-17  [Irrigation].Apply(42);
              1997-05-02  [Irrigation].Apply(27);
            Irrigation
            Fertiliser
            MicroClimate: a_interception=0; b_interception=1; c_interception=0; d_interception=0; SoilHeatFluxFraction=0.4; MinimumHeightDiffForNewLayer=0; NightInterceptionFraction=0.5; ReferenceHeight=2
            Soil HRS: SoilType=HMM; Site=HRS; NearestTown=Unknown; Region=SE Queensland; NaturalVegetation=Unknown; Latitude=0; Longitude=0
              Physical
                Thickness  BD    AirDry  LL15   DUL   SAT
                100        1.34  0.08    0.226  0.42  0.45
                100        1.34  0.19    0.226  0.42  0.45
                200        1.33  0.23    0.258  0.46  0.48
                200        1.38  0.26    0.27   0.46  0.47
                200        1.4   0.26    0.268  0.43  0.45
                200        1.55  0.28    0.304  0.4   0.41
                200        1.59  0.25    0.335  0.37  0.38
                200        1.63  0.28    0.33   0.33  0.37
                200        1.66  0.3     0.32   0.32  0.37
                200        1.68  0.31    0.33   0.33  0.36
                SoilCrop SorghumSoil
                  LL=[0.226, 0.226, 0.258, 0.27, 0.268, 0.304, 0.335, 0.33, 0.32, 0.33]
                  KL=[0.07, 0.07, 0.07, 0.07, 0.06, 0.06, 0.06, 0.05, 0.05, 0.04]
                  XF=[1, 1, 1, 1, 1, 1, 1, 1, 1, 1]
              WaterBalance SoilWater: SummerDate=1-Nov; SummerU=1.5; SummerCona=6.5; WinterDate=1-Apr; WinterU=1.5; WinterCona=6.5; DiffusConst=40; DiffusSlope=16; Salb=0.2; CN2Bare=85; CNRed=20; CNCov=0.8; PSIDul=-100; Thickness=[100, 100, 200, 200, 200, 200, 200, 200, 200, 200]; SWCON=[0.3, 0.3, 0.3, 0.3, 0.3, 0.3, 0.3, 0.3, 0.3, 0.3]
              Nutrient
              Organic: FOMCNRatio=50; CarbonUnits=Total
                Thickness  Carbon  SoilCNRatio  FBiom  FInert  FOM
                100        1.19    12.5         0.05   0.3     260.587
                100        0.59    12.5         0.02   0.45    220.582
                200        0.45    12.5         0.01   0.6     158.054
                200        0.3     12.5         0.01   0.75    113.251
                200        0.2     12.5         0.01   0.9     81.1478
                200        0.16    12.5         0.01   0.9     58.1449
                200        0.17    12.5         0.01   0.9     41.6626
                200        0.17    12.5         0.05   0.9     29.8526
                200        0.17    12.5         0.02   0.9     21.3903
                200        0.17    12.5         0.01   0.9     15.3268
              Chemical: Thickness=[100, 100, 200, 200, 200, 200, 200, 200, 200, 200]; PH=[6.3, 6.4, 6.5, 6.6, 6.6, 6.5, 6.5, 6.5, 6.5, 6.5]; PHUnits=Water
              Water: Thickness=[100, 100, 200, 200, 200, 200, 200, 200, 200, 200]; InitialPAWmm=11.9; RelativeTo=LL15; FilledFromTop=false
                InitialValues=[0.235, 0.252, 0.27, 0.3, 0.268, 0.304, 0.335, 0.33, 0.32, 0.33]
              CERESSoilTemperature Temperature
              Solute NO3: Thickness=[100, 100, 200, 200, 200, 200, 200, 200, 200, 200]; InitialValuesUnits=ppm; WaterTableConcentration=0; D0=0; DepthConstant=0; MaxDepthSoluteAccessible=0; RunoffEffectivenessAtMovingSolute=0; MaxEffectiveRunoff=0
                InitialValues=[10.4, 1.633, 1.233, 0.9, 1.1, 1.467, 3.633, 5.667, 5.8, 7.267]
              Solute NH4: Thickness=[100, 100, 200, 200, 200, 200, 200, 200, 200, 200]; InitialValues=[0.1, 0.1, 0.1, 0.1, 0.1, 0.1, 0.1, 0.1, 0.1, 0.1]; InitialValuesUnits=ppm; WaterTableConcentration=0; D0=0; DepthConstant=0; MaxDepthSoluteAccessible=0; RunoffEffectivenessAtMovingSolute=0; MaxEffectiveRunoff=0
              Solute Urea: Thickness=[100, 100, 200, 200, 200, 200, 200, 200, 200, 200]; InitialValues=[0, 0, 0, 0, 0, 0, 0, 0, 0, 0]; InitialValuesUnits=kg/ha; WaterTableConcentration=0; D0=0; DepthConstant=0; MaxDepthSoluteAccessible=0; RunoffEffectivenessAtMovingSolute=0; MaxEffectiveRunoff=0
            Plant Sorghum
            SurfaceOrganicMatter: InitialResidueName=wheat_stubble; InitialResidueType=wheat; InitialResidueMass=0; InitialStandingFraction=0; InitialCPR=0; InitialCNR=80
            DCaPSTModelNG DCaPST: CropName=Sorghum; Biolimit=0; Reduction=0
              Folder CultivarParameters
